# Initialize LAMMPS
units metal
dimension 3
boundary p p p
atom_style atomic

# Read data from POSCAR file
include src/structure.mod
include src/potential.mod

thermo_style custom step temp pe ke etotal vol
thermo 10

velocity all create TEMP_INIT 4928459 rot yes mom yes dist gaussian
variable dt equal 0.001  # Timestep in picoseconds
compute PE all pe

fix 1 all nvt temp TEMP_INIT TEMP_FINAL $(100.0*dt)

fix avePE all ave/time 1 20 20 c_PE ave one

timestep 0.001

#run 0

# do not let the cell volume change from the NPT volume
fix holdBox all deform 1 x final 0.0 0.0 y final 0.0 0.0 z final 0.0 0.0 units box remap v

# Perform relaxation
min_style cg
minimize 1e-10 1e-10 15000 15000

variable etotal equal pe
print "${etotal}" file energy.txt

write_data CONTCAR.data nocoeff
