# Initialize LAMMPS
units metal
dimension 3
boundary p p p
atom_style atomic

# Read data from POSCAR file
include src/structure.mod
include src/potential.mod

thermo_style custom step temp pe etotal vol
thermo 10

# Define a region for frozen atoms
variable freeze_threshold equal FREEZE_THRESHOLD
region freeze_region block INF INF INF INF 0.0 ${freeze_threshold}

# Assign frozen atoms to the group
group frozen_atoms region freeze_region

# Apply freezing constraints only if freeze_threshold > 0
if "${freeze_threshold} > 0.0" then &
  "fix freeze frozen_atoms setforce 0.0 0.0 0.0" &
  "velocity frozen_atoms set 0.0 0.0 0.0"


# do not let the cell volume change from the NPT volume
fix holdBox all deform 1 x final 0.0 0.0 y final 0.0 0.0 z final 0.0 0.0 units box remap v

# Perform relaxation
min_style cg
minimize 1e-12 1e-12 15000 15000

variable etotal equal pe
print "${etotal}" file energy.txt

write_data CONTCAR.data nocoeff
